*Heading
** Job name: Job-2 Model name: Model-1
** Generated by: Abaqus/CAE 2020
*Preprint, echo=NO, model=NO, history=NO, contact=NO
**
** PARTS
**
*Part, name=Part-1
*Node
      1,      141.625,        26.75,       213.75
      2,      142.875,        26.75,       213.75
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*Element, type=S4R
 1,   1,   2, 813, 851
 2, 851, 813, 814, 850
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*Element, type=B31
13173,    91, 10080
13174, 10080, 10081
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*Element, type=S3
13571, 10460, 16038, 10459
13572, 16068, 15894, 16084
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*Nset, nset=ColA
    27,    28,    32,    33,   134,   137
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*Elset, elset=ColA
  7711,  7712,  7713,  7714,  7715,  7716
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*Nset, nset=BaseSet
   620,   621,   638,   639,   640,   641
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*Elset, elset=BaseSet
  8701,  8702,  8703,  8704,  8705,  8706
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*Nset, nset=ColTop
   618,   619,   634,   635,   636,   637
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*Elset, elset=ColTop
  8689,  8690,  8691,  8692,  8693,  8694
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*Nset, nset=FrameTip
   622,   623,   624,   625,   626,   627
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*Elset, elset=FrameTip, generate
 8263,  8634,     1
*Nset, nset=RibSheetSet
   134,   135,   136,   137,   138,   139
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*Elset, elset=RibSheetSet
  1285,  1286,  1287,  1288,  1289,  1290
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*Nset, nset=FrameSet
     1,     2,     9,    10,    17,    18
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*Elset, elset=FrameSet
    91,    92,    93,    94,    95,    96
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*Nset, nset=I-BeamSet
     1,     2,     3,     4,     5,     6
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*Elset, elset=I-BeamSet
    1,    2,    3,    4,    5,    6
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*Nset, nset=L-BeamSet
    31,    41,    45,    46,    54,    58
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*Elset, elset=L-BeamSet, generate
 13380,  13570,      1
*Nset, nset=WalkSheetSet
     6,    14,    22,    91,   100,   113
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*Elset, elset=WalkSheetSet, generate
 13173,  13241,      1
*Nset, nset=WalkBeamSet
     7,     8,    15,    16,    23,    24
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*Elset, elset=WalkBeamSet, generate
 13242,  13379,      1
*Elset, elset=Corroded_Sheet
  1850,  5254,  5255,  5256,  5257,  5258
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** Section: I-Beam
*Shell Section, elset=I-BeamSet, material=Material-1
0.281077, 5
** Section: Frame
*Shell Section, elset=FrameSet, material=Material-1
0.321043, 5
** Region: (RibSheet:RibSheetSet)
*Elset, elset=_I3, internal
  1285,  1286,  1287,  1288,  1289,  1290
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** Section: RibSheet
*Shell Section, elset=_I3, material=Material-1
0.0694053, 5
** Section: RibSheet_Corroded
*Shell Section, elset=Corroded_Sheet, material=Material-Corroded
0.0694053, 5
** Section: ColA
*Shell Section, elset=ColA, material=Material-1
0.209156, 5
** Section: Frame
*Shell Section, elset=FrameTip, material=Material-1
0.321043, 5
** Section: ColTop
*Shell Section, elset=ColTop, material=Material-1
0.227339, 5
** Section: Base
*Shell Section, elset=BaseSet, material=Material-1
2., 5
** Section: WalkSheet  Profile: Profile-3
*Beam Section, elset=WalkSheetSet, material=Material-1, temperature=GRADIENTS, section=RECT
25., 0.1
0.,0.,-1.
** Section: WalkBeam  Profile: Profile-2
*Beam Section, elset=WalkBeamSet, material=Material-1, temperature=GRADIENTS, section=RECT
1., 1.
0.,0.,-1.
** Section: L-Beam  Profile: Profile-1
*Beam Section, elset=L-BeamSet, material=Material-1, temperature=GRADIENTS, section=L
4., 4., 0.25, 0.25
0.,0.,-1.
*End Part
**
**
** ASSEMBLY
**
*Assembly, name=Assembly
**
*Instance, name=Part-1-1, part=Part-1
*End Instance
**
*Nset, nset=BaseMeshNode, instance=Part-1-1
   620,   621,   639,   640,   641,   642
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*Nset, nset=Set-1, instance=Part-1-1
 645, 646, 650, 653
*Nset, nset=Set-2, instance=Part-1-1
 620, 621, 640, 641, 644, 645, 646, 648, 650, 653, 656, 657
*Nset, nset=Set-4, instance=Part-1-1
 628, 629
*Nset, nset=Set-5, instance=Part-1-1
 625, 630
*Nset, nset=VerticalPointLoadSet, instance=Part-1-1
 630,
*Elset, elset=_Surf-1_SPOS, internal, instance=Part-1-1
  5281,  5282,  5283,  5284,  5285,  5286
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*Elset, elset=_Surf-1_SNEG, internal, instance=Part-1-1, generate
 16281,  18101,      1
*Surface, type=ELEMENT, name=Surf-1
_Surf-1_SPOS, SPOS
_Surf-1_SNEG, SNEG
*End Assembly
**
** MATERIALS
**
*Material, name=Material-1
*Density
 0.000686119,
*Elastic
 2.36311e+07, 0.281567
*Plastic
36300.,     0.
75000., 0.2287
*Material, name=Material-Corroded
*Density
 0.0007487,
*Elastic
 8.18842e+06, 0.26
*Plastic
36300.,     0.
75000., 0.2287
** ----------------------------------------------------------------
**
** STEP: Step-1
**
*Step, name=Step-1, nlgeom=YES
*Static
1., 1., 1e-05, 1.
**
** BOUNDARY CONDITIONS
**
** Name: BC-1 Type: Displacement/Rotation
*Boundary
Set-2, 1, 1
Set-2, 2, 2
Set-2, 3, 3
Set-2, 4, 4
Set-2, 5, 5
Set-2, 6, 6
**
** LOADS
**
** Name: Load-1   Type: Gravity
*Dload
, GRAV, 386., 0., 0., -1.
**
** OUTPUT REQUESTS
**
*Restart, write, frequency=0
**
** FIELD OUTPUT: F-Output-1
**
*Output, field, variable=PRESELECT
**
** HISTORY OUTPUT: H-Output-1
**
*Output, history, variable=PRESELECT
*End Step
